# input file for langevin/abp thermostat, atom_style dipole
atom_modify map array

dimension 2

units lj
atom_style dipole
boundary p p p
pair_style mie/cut 1

#read_data init_config114.411404108.txt
read_data /home2/aandr/mips/init_config114.411404108_10000particles.txt

#  dump initial config
reset_timestep 0

pair_coeff 1 1 1. 0.9785720621 64. 32.

neighbor 0.2 bin
neigh_modify every 1 delay 0 check yes

timestep 0.005

#fix 1 all langevin/abp 0.05 0.05 100 12581 0.001 1 2
fix 1 all langevin/abp 0.05 0.05 100 12581 0.1 1. 2
fix 2 all nve
fix 3 all enforce2d

# print.stepsxl has higher numbers than print.steps, for running longer simulations
# print.stepsxl goes from 10^0 to 10^7, print.steps only goes up to 10^5
variable f file /home2/aandr/mips/print.stepsxl
#variable f file /home2/aandr/print.steps
variable s equal next(f)


dump pos1 all custom 100 /home2/aandr/mips/position/*.txt x y
dump_modify pos1 every v_s first yes
dump_modify pos1 sort id


#changed this line after switching to print.stepsxl
#run 100000 upto
run 10000000 upto

unfix 1
